atom_style hybrid angle sphere
units si
processors	* * 1
comm_modify vel yes

region simulationStation block -0.25 0.25 -0.25 0.25 -0.1 0.1
create_box 100 simulationStation bond/types 100000 extra/bond/per/atom 100 angle/types 10000 extra/angle/per/atom 100
change_box	all boundary p p f

pair_style hybrid/overlay granular lj/cut 0
pair_coeff  * * granular hertz/material 0 0 0 tangential linear_nohistory 0 0
pair_coeff  * * lj/cut 0 0 0

special_bonds lj/coul 0 1.0 1.0
bond_style harmonic
angle_style cosine

bond_coeff * 0 0
angle_coeff * 0
fix integration all nve/sphere
neigh_modify page 500000 one 50000


### Here we will begin to include particles ###


include grains_1.txt
set type 1 diameter 0.1
set type 1 density 0.01

include grains_2.txt
set type 2 diameter 0.1
set type 2 density 0.01
pair_coeff 1 1 granular hertz/material 1000000 0 0.5 tangential linear_nohistory 0 0
pair_coeff 2 2 granular hertz/material 1000000 0 0.5 tangential linear_nohistory 0 0

group group_perturb_1 id 1
fix fix_perturb_1 group_perturb_1 gravity 1e-05 vector 0.001 0.001 0

group group_perturb_2 id 2
fix fix_perturb_2 group_perturb_2 gravity 1e-05 vector -0.001 -0.001 0
dump DUMPFILE all xyz 100 dump.xyz

compute bendingE all pe/atom angle
compute stretchingE all pe/atom bond
dump pump all custom 1 out*.dump id type radius x y z fx fy fz c_bendingE c_stretchingE
dump_modify pump pad 11

timestep 5e-07
dump_modify pump every 100000
run 2000000
